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/BATCH
/COM,ANSYS RELEASE Release 16.2      BUILD 16.2      UP20150629       22:51:39
/input,menust,tmp,''
/GST,ON
/PLO,INFO,3
/GRO,CURL,ON
/CPLANE,1
WPSTYLE,,,,,,,,0
/PREP7
/NOPR
KEYW,PR_SET,1
KEYW,PR_STRUC,1
KEYW,PR_THERM,0
KEYW,PR_FLUID,0
KEYW,PR_ELMAG,0
KEYW,MAGNOD,0
KEYW,MAGEDG,0
KEYW,MAGHFE,0
KEYW,MAGELC,0
KEYW,PR_MULTI,0
/GO
/COM,
/COM,Preferences for GUI filtering have been set to display:
/COM,  Structural
/NOPR
KEYW,PR_SET,1
KEYW,PR_STRUC,1
KEYW,PR_THERM,0
KEYW,PR_FLUID,0
KEYW,PR_ELMAG,0
KEYW,MAGNOD,0
KEYW,MAGEDG,0
KEYW,MAGHFE,0
KEYW,MAGELC,0
KEYW,PR_MULTI,0
/GO
/COM,
/COM,Preferences for GUI filtering have been set to display:
/COM,  Structural
ET,1,PLANE183
MPTEMP,,,,,,,,
MPTEMP,1,0
MPDATA,EX,1,,200e9
MPDATA,PRXY,1,,0.3
MPTEMP,,,,,,,,
MPTEMP,1,0
MPDATA,DENS,1,,7800
K,1,0,0,0,
K,2,2,0,0,
K,3,2,1,0,
K,4,0,1,0,
K,5,2,0.25,0,
K,6,2,0.5,0,
K,7,2,0.75,0,
LSTR,       4,       3
LSTR,       3,       2
LSTR,       2,       1
LSTR,       1,       4
K,8,1,0.5,0,
FLST,2,2,8
FITEM,2,1,0.5,0
FITEM,2,0.85,0.3,0
CIRCLE,P51X
FLST,2,8,4
FITEM,2,4
FITEM,2,1
FITEM,2,2
FITEM,2,3
FITEM,2,5
FITEM,2,6
FITEM,2,7
FITEM,2,8
AL,P51X
MSHAPE,1,2D
MSHKEY,0
CM,_Y,AREA
ASEL, , , ,       1
CM,_Y1,AREA
CHKMSH,'AREA'
CMSEL,S,_Y
AMESH,_Y1
CMDELE,_Y
CMDELE,_Y1
CMDELE,_Y2
FLST,5,1,5,ORDE,1
FITEM,5,1
CM,_Y,AREA
ASEL, , , ,P51X
CM,_Y1,AREA
CMSEL,S,_Y
CMDELE,_Y
AREFINE,_Y1, , ,1,0,1,1
CMDELE,_Y1
FINISH
/SOL
FINISH
/PREP7
FINISH
/SOL
FLST,2,1,4,ORDE,1
FITEM,2,4
/GO
DL,P51X, ,ALL,
FLST,2,1,4,ORDE,1
FITEM,2,4
FLST,2,1,4,ORDE,1
FITEM,2,4
DLDELE,P51X,ALL
FLST,2,5,1,ORDE,5
FITEM,2,1
FITEM,2,-2
FITEM,2,4
FITEM,2,302
FITEM,2,308
FDELE,P51X,ALL
FLST,2,1,4,ORDE,1
FITEM,2,4
DLDELE,P51X,ALL
FLST,2,5,1,ORDE,5
FITEM,2,1
FITEM,2,-2
FITEM,2,4
FITEM,2,302
FITEM,2,308
DDELE,P51X,ALL
FLST,2,3,1,ORDE,3
FITEM,2,4
FITEM,2,302
FITEM,2,308
FDELE,P51X,ALL
FLST,2,1,4,ORDE,1
FITEM,2,4
DLDELE,P51X,ALL
FLST,2,5,1,ORDE,5
FITEM,2,1
FITEM,2,-2
FITEM,2,4
FITEM,2,302
FITEM,2,308
DDELE,P51X,ALL
LSCLEAR,ALL
FLST,2,1,4,ORDE,1
FITEM,2,4
/GO
DL,P51X, ,ALL,0
FINISH
/PREP7
FLST,5,1,5,ORDE,1
FITEM,5,1
CM,_Y,AREA
ASEL, , , ,P51X
CM,_Y1,AREA
CMSEL,S,_Y
CMDELE,_Y
AREFINE,_Y1, , ,1,0,1,1
CMDELE,_Y1
FINISH
/SOL
LSCLEAR,ALL
FLST,2,1,4,ORDE,1
FITEM,2,4
/GO
DL,P51X, ,ALL,0
FLST,2,5,1,ORDE,5
FITEM,2,323
FITEM,2,338
FITEM,2,1060
FITEM,2,1068
FITEM,2,1109
/GO
F,P51X,FX,100
FINISH
/POST1
FINISH
/SOL
/STATUS,SOLU
SOLVE
FINISH
/POST1
/SHOW,WIN32C
SET,FIRST
/PLOPTS,INFO,3
/CONTOUR,ALL,18
/NUMBER,1
PLNSOL,S,EQV
PLNSOL,S,EQV
PLNSOL,S,EQV
PLNSOL,S,EQV
PLNSOL,S,EQV
PLNSOL,S,EQV
SET,,,,0,2.0
PLNSOL,S,EQV
SET,1, 1,0
PLNSOL,
! /UIS,ABORT,1
/SHOW,WIN32
SAVE,'PlaneStress','db','C:\USERS\SINA\DESKTOP\DESKTOP\FEM\'
FINISH
! /EXIT,ALL
/BATCH
/COM,ANSYS RELEASE Release 16.2      BUILD 16.2      UP20150629       23:09:17
/input,menust,tmp,''
/GST,ON
/PLO,INFO,3
/GRO,CURL,ON
/CPLANE,1
WPSTYLE,,,,,,,,0
RESUME,'PlaneStress','dbb','.'
/COM,ANSYS RELEASE Release 16.2      BUILD 16.2      UP20150629       23:09:45
/POST1
/SHOW,WIN32C
SET,FIRST
/PLOPTS,INFO,3
/NUMBER,1
PLNSOL,S,EQV
! /UIS,ABORT,1
/SHOW,WIN32
FINISH
! /EXIT,ALL
/BATCH
/COM,ANSYS RELEASE Release 16.2      BUILD 16.2      UP20150629       23:22:54
/input,menust,tmp,''
/GST,ON
/PLO,INFO,3
/GRO,CURL,ON
/CPLANE,1
WPSTYLE,,,,,,,,0
/SOLU
FINISH
/POST1
RESUME,'PlaneStress','dbb','.'
/COM,ANSYS RELEASE Release 16.2      BUILD 16.2      UP20150629       23:23:17
SET,LIST,999
SET,,, ,,, ,1
SET,,, ,,, ,1
SET,LIST,999
PLESOL, S,EQV, 0,1.0
SET,LIST,999
SET,,, ,,, ,1
SET,,, ,,, ,1
FINISH
! /EXIT,NOSAV
